# Вариант 13
Y(x1, x2, x3, x4, x5) := 2*x1 + 4*x2 + 0*x3 + 0*x4 + 0*x5
x1 := 0
x2 := 0
x3 := 480
x4 := 444
x5 := 546
Given
4*x1 + 3*x2 + 1*x3 == 480
3*x1 + 4*x2 + 1*x4 == 444
2*x1 + 6*x2 + 1*x5 == 546
x1 ≥ 0
x2 ≥ 0
x3 ≥ 0
x4 ≥ 0
x5 ≥ 0
[x1; x2; x3; x4; x5] := Maximize(Y, x1, x2, x3, x4, x5)
[x1; x2; x3; x4; x5] = [48; 75; 63; 0; 0]
Y(x1, x2, x3, x4, x5) = 396
