# Вариант 13
# Прямая задача:
n := 2
m := 3
A := [4, 3; 3, 4; 2, 6]
b := [480; 444; 546]
c := [2; 4]
X := [1; 1]
F(X) := c*X
Given
A*X ≤ b
X ≥ 0
y := Maximize(F, X)
y = [48; 75]
F(y) = 396
A*y = [417; 444; 546]
# Двойственная задача:
n := 3
m := 2
A := [4, 3, 2; 3, 4, 6]
b := [2; 4]
c := [480; 444; 546]
X := [1; 1; 1]
F(X) := c*X
Given
A*X ≥ b
X ≥ 0
y := Minimize(F, X)
y = [0; 0.4; 0.4]
F(y) = 396
A*y = [2; 4]
