# Вариант 13
ORIGIN := 1
i := 1 .. 15
x[i] := 0
F1(x) := 1*x[1] + 2*x[2] + 3*x[3] + 5*x[4] + 2*x[5]
F2(x) := 4*x[6] + 6*x[7] + 7*x[8] + 3*x[9] + 1*x[10]
F3(x) := 3*x[11] + 2*x[12] + 3*x[13] + 4*x[14] + 5*x[15]
T(x) := F1(x) + F2(x) + F3(x)
Given
x[1] + x[2] + x[3] + x[4] + x[5] == 250
x[6] + x[7] + x[8] + x[9] + x[10] == 200
x[11] + x[12] + x[13] + x[14] + x[15] == 220
x[1] + x[6] + x[11] == 140
x[2] + x[7] + x[12] == 110
x[3] + x[8] + x[13] == 170
x[4] + x[9] + x[14] == 110
x[5] + x[10] + x[15] == 140
x[1] > 0
x[2] > 0
x[3] > 0
x[4] > 0
x[5] > 0
x[6] > 0
x[7] > 0
x[8] > 0
x[9] > 0
x[10] > 0
x[11] > 0
x[12] > 0
x[13] > 0
x[14] > 0
x[15] > 0
D := Minimize(T, x)
transpose(D) = [140, 110, 0, 0, 0, 0, 0, 0, 60, 140, 0, 0, 170, 50, 0]
F1(D) = 360
F2(D) = 320
F3(D) = 710
T(D) = 1390
