# Лабораторная работа №6
minm(A, n) :=
    for j ∈ 0 .. n - 1
        h[j] ← min(A[:, j])
    h
Ftab(C, n, h, g, p, q, ni, nj) :=
    A ← augment(ni, C, h, p)
    A ← stack(augment("i/j", transpose(nj), "h", "a"), A)
    A ← stack(A, augment("g", transpose(g), 0, 0))
    A ← stack(A, augment("b", transpose(g), 0, 0))
redm(A, n, h) :=
    for j ∈ 0 .. n - 1
        B[:, j] ← A[:, j] - h
    B
alphm(A, n) :=
    for i ∈ 0 .. n - 1
        h[i] ← sort(A[:, i])[1]
    h
fim(a, b) :=
    n ← last(a)
    for i ∈ 0 .. n
        c ← i if a[i] == b
    c
fij(A, n, p, q) :=
    k ← 0
    for i ∈ 0 .. n - 1
        for j ∈ 0 .. n - 1
            if A[i, j] == 0
                s[k] ← p[i] + q[j]
                a[k] ← i
                b[k] ← j
                k ← k + 1
    c ← (a, b, s)
chinf(A) :=
    n ← cols(A)
    m ← rows(A)
    for i ∈ 0 .. m - 1
        for j ∈ 0 .. n - 1
            if IsScalar(A[i, j])
                A[i, j] ← "#" if A[i, j] == ∞
                0
    A
fn1(A, n, im, jm) :=
    A1 ← submatrix(A, 0, im - 1, 0, n + 2)
    A2 ← submatrix(A, im + 1, n + 2, 0, n + 2)
    A12 ← stack(A1, A2)
    B1 ← submatrix(A12, 0, n + 1, 0, jm + 1)
    B2 ← submatrix(A12, 0, n + 1, jm + 1, n + 2)
    augment(B1, B2)
C := [∞, 6, 7, 7, 4; 6, ∞, 6, 1, 3; 7, 6, ∞, 7, 7; 7, 1, 7, ∞, 3; 4, 3, 7, 3, ∞]
n := last(C[:, 0]) + 1
i := 1 .. n
ni[i - 1] := i
nj := ni
h := minm(transpose(C), n)
C1 := redm(C, n, h)
g := minm(C1, n)
C2 := transpose(redm(transpose(C1), n, g))
p := alphm(transpose(C2), n)
q := alphm(C2, n)
g[2] := g[2] + 2 = 5
Atab := Ftab(C2, n, h, g, p, q, ni, nj)
chinf(Atab) = [
    "i/j", 1, 2, 3, 4, 5, "h", "a";
    1, "#", 2, 0, 3, 0, 4, 0;
    2, 4, "#", 2, 0, 2, 1, 2;
    3, 0, 0, "#", 1, 1, 6, 0;
    4, 5, 0, 3, "#", 2, 1, 2;
    5, 0, 0, 1, 0, "#", 3, 0;
    "g", 1, 0, 5, 0, 0, 0, 0;
    "b", 1, 0, 5, 0, 0, 0, 0
]
sum(h[i], i = 0 .. n - 1) + sum(g[i], i = 0 .. n - 1) = 21
